a := 0.3*m
b := 0.75*m
c1 := 2*m
Ro := 1000*kg/m^3
g = 9.80665 m/s^2
R
# Прямоугольный аквариум
# т.к. у аквариумов объемы равны, то мы находим радиус R для сферического аквариума
# Vabc1 | Vсферы
a*bc1 = 4/3*π*R^3  # error: Эта переменная не определена.
R
nthroot(3*a*b*c1/(4*π), 3) = 0.47538 m
Fbc := integral(Ro*g*b*x^2, x = 0 .. c1) = 19613.3 J
Fac := integral(Ro*g*a*x^2, x = 0 .. c1) = 7845.32 J
Fbottom := Ro*g*c1 = 19613.3 Pa
# Для сферического аквариума:
# R^2=(R-h)^2+r^2
# r=sqrt(h(2R-h))
# dF=RoghdS
# dF=Rogh2πrdx
# dF=Rogπ*sqrt(2Rx-x^2)*2(2R-x)dx
Fsphera := Ro*g*π*integral(sqrt(2*R*x - x^2)*(4*R - 2*x), x = 0 .. 2*R) = 16596 kg*K^3/(m^2*s^2)
