# y - матрица давления
# x - матрица температуры
# z - матрица зависимости теплопроводности от температуры и давления
#
# Mxy - объединяем матрицы x и y, сбоку
#
# vs - вектор значений коэффициентов кубического сплайна для Mxy и z
#
# r(x,y) - апроксимируем по вектору значений кубического сплайна vs
# матрице x и y, матрице z - зависимости от x и y, и передаваемым
# координатам x и y
x := [275; 300; 325; 350; 375; 400; 425; 450; 500]
y := [0.1; 1; 5; 10; 15; 20; 25; 30; 35]
z := [
    24.2, 24.5, 26.7, 30.2, 34.4, 38.3, 42.4, 46.7, 50.9;
    26.2, 26.5, 28.4, 31.4, 34.9, 38.5, 42.0, 45.6, 49.3;
    28.0, 28.7, 30.1, 32.6, 35.6, 38.8, 41.9, 44.8, 48.1;
    30.0, 30.7, 31.8, 34.1, 36.7, 39.5, 42.3, 45.1, 47.8;
    31.9, 32.5, 33.6, 35.6, 38.1, 40.5, 43.1, 45.6, 48.0;
    33.8, 34.4, 35.4, 37.3, 39.4, 41.8, 44.1, 46.4, 48.6;
    35.5, 36.1, 37.0, 38.8, 40.7, 42.9, 45.1, 47.2, 49.2;
    37.3, 38.1, 38.7, 40.3, 42.0, 44.0, 46.2, 48.0, 49.9;
    40.7, 41.1, 42.0, 43.3, 44.9, 46.5, 48.3, 50.1, 51.8
]
Mxy := augment(x, y)
vs := cspline(Mxy, z)
r(x, y) := interp(vs, Mxy, z, [x; y])
r(280, 32) = 48.1924
r(500, 35) = 51.8
r(276, 0.2) = 24.3168
# [component: inputs r]
